/BATCH
! /COM,ANSYS RELEASE 2024 R2           BUILD 24.2      UP20240603       10:08:06
/input,menust,tmp,''
! /GRA,POWER
! /GST,ON
! /PLO,INFO,3
! /GRO,CURL,ON
! /CPLANE,1
! /REPLOT,RESIZE
WPSTYLE,,,,,,,,0
! /REPLOT,RESIZE
! /REPLOT,RESIZE
! /REPLOT,RESIZE
! /REPLOT,RESIZE
! /REPLOT,RESIZE
! /REPLOT,RESIZE
! /DIST, 1 ,0.924021,1
! /REP,FAST
! /DIST, 1 ,0.924021,1
! /REP,FAST
! /DIST, 1 ,0.924021,1
! /REP,FAST
/PREP7
! /REPLOT,RESIZE
! /REPLOT,RESIZE
!*
!*
!*
! /REPLOT,RESIZE
! /REPLOT,RESIZE
! /REPLOT,RESIZE
!*
! /REPLOT,RESIZE
!*
ET,1,PLANE182
!*
!*
KEYOPT,1,1,0
KEYOPT,1,3,2
KEYOPT,1,6,0
!*
! /REPLOT,RESIZE
!*
KEYOPT,1,1,0
KEYOPT,1,3,2
KEYOPT,1,6,0
!*
!*
! /REPLOT,RESIZE
! /REPLOT,RESIZE
MP,EX,1,6.8e9
MP,PRXY,1,0.33
! /REPLOT,RESIZE
! /REPLOT,RESIZE
K,1,0,0,0,
K,2,0.6,0,0,
K,3,0.6,-0.15,0,
K,4,0.3,-0.15,0,
K,5,0.2625,-0.15,0,
K,6,0,-0.15,0,
K,6,0,-0.15,0,
!*
K,4,0.3375,-0.15,0,
K,5,0.3,-0.15,0,
K,6,0.3,-0.1125,0,
K,7,0.2625,-0.15,0,
K,8,0,-0.15,0,
K,8,0,-0.15,0,
! /DIST, 1 ,0.924021,1
! /REP,FAST
! /DIST, 1 ,0.924021,1
! /REP,FAST
! /DIST, 1 ,0.924021,1
! /REP,FAST
! /DIST, 1 ,0.924021,1
! /REP,FAST
! /DIST, 1 ,0.924021,1
! /REP,FAST
! /DIST, 1 ,0.924021,1
! /REP,FAST
! /DIST, 1 ,0.924021,1
! /REP,FAST
! /DIST, 1 ,1.082226,1
! /REP,FAST
! /DIST, 1 ,1.082226,1
! /REP,FAST
! /DIST, 1 ,1.082226,1
! /REP,FAST
! /DIST, 1 ,0.924021,1
! /REP,FAST
L,1-2
L,1,2
L,2,3
L,3,4
L,7,8
L,8,1
LARC,4,6
LARC,4,7,5
LARC,4,7,5,0.0375
LARC,4,6,5,0.0375
LARC,6,7,5,0.0375
! /DIST, 1 ,0.924021,1
! /REP,FAST
! /DIST, 1 ,0.924021,1
! /REP,FAST
! /DIST, 1 ,0.924021,1
! /REP,FAST
! /DIST, 1 ,1.082226,1
! /REP,FAST
! /DIST, 1 ,1.082226,1
! /REP,FAST
! /DIST, 1 ,1.082226,1
! /REP,FAST
! /DIST, 1 ,1.082226,1
! /REP,FAST
! /DIST, 1 ,1.082226,1
! /REP,FAST
! /DIST, 1 ,0.924021,1
! /REP,FAST
! /DIST, 1 ,0.924021,1
! /REP,FAST
! /DIST, 1 ,0.924021,1
! /REP,FAST
! /DIST, 1 ,0.924021,1
! /REP,FAST
! /DIST, 1 ,0.924021,1
! /REP,FAST
! /DIST, 1 ,0.924021,1
! /REP,FAST
! /DIST, 1 ,1.082226,1
! /REP,FAST
! /DIST, 1 ,1.082226,1
! /REP,FAST
! /DIST, 1 ,1.082226,1
! /REP,FAST
! LPLOT
! NPLOT
! LPLOT
! KPLOT
! /REPLOT
! /REPLOT,RESIZE
! /REPLOT,RESIZE
! /REPLOT,RESIZE
! /REPLOT,RESIZE
! /REPLOT,RESIZE
! /REPLOT,RESIZE
! /REPLOT,RESIZE
! /REPLOT,RESIZE
! /REPLOT,RESIZE
! /REPLOT,RESIZE
! /REPLOT,RESIZE
! /REPLOT,RESIZE
! /REPLOT,RESIZE
! /REPLOT,RESIZE
! /PNUM,KP,1
! /PNUM,LINE,0
! /PNUM,AREA,0
! /PNUM,VOLU,0
! /PNUM,NODE,0
! /PNUM,TABN,0
! /PNUM,SVAL,0
! /NUMBER,0
!*
! /PNUM,ELEM,0
! /REPLOT
!*
! LPLOT
! /DIST, 1 ,1.082226,1
! /REP,FAST
! /DIST, 1 ,0.924021,1
! /REP,FAST
! /DIST, 1 ,0.924021,1
! /REP,FAST
AL,L1,L2,L3,L4,L5,L6,L7
AL,1,2,3,4,5,6,7
R,1,0.001
! /VIEW,1,1,2,3
! /ANG,1
! /REP,FAST
! /VIEW,1,1,1,1
! /ANG,1
! /REP,FAST
R,1,.01
! APLOT
! VPLOT
! /VIEW,1,1,2,3
! /ANG,1
! /REP,FAST
! /VIEW,1,1,1,1
! /ANG,1
! /REP,FAST
! /DIST, 1 ,1.082226,1
! /REP,FAST
! /DIST, 1 ,1.082226,1
! /REP,FAST
! /DIST, 1 ,1.082226,1
! /REP,FAST
! /DIST, 1 ,0.924021,1
! /REP,FAST
! /DIST, 1 ,0.924021,1
! /REP,FAST
! /DIST, 1 ,0.924021,1
! /REP,FAST
! /DIST, 1 ,0.924021,1
! /REP,FAST
! /DIST, 1 ,0.924021,1
! /REP,FAST
! /DIST, 1 ,0.924021,1
! /REP,FAST
! /DIST, 1 ,0.924021,1
! /REP,FAST
! /DIST, 1 ,0.924021,1
! /REP,FAST
! /DIST, 1 ,1.082226,1
! /REP,FAST
! /DIST, 1 ,1.082226,1
! /REP,FAST
! /DIST, 1 ,1.082226,1
! /REP,FAST
! /DIST, 1 ,1.082226,1
! /REP,FAST
! /DIST, 1 ,1.082226,1
! /REP,FAST
! /DIST, 1 ,1.082226,1
! /REP,FAST
! /VIEW,1,,,1
! /ANG,1
! /REP,FAST
! /DIST, 1 ,0.924021,1
! /REP,FAST
! /DIST, 1 ,0.924021,1
! /REP,FAST
! /DIST, 1 ,0.924021,1
! /REP,FAST
! /DIST, 1 ,1.082226,1
! /REP,FAST
! /DIST, 1 ,1.082226,1
! /REP,FAST
! /VIEW,1,1,1,1
! /ANG,1
! /REP,FAST
! /VIEW,1,,,1
! /ANG,1
! /REP,FAST
! /PNUM,KP,1
! /PNUM,LINE,1
! /PNUM,AREA,1
! /PNUM,VOLU,1
! /PNUM,NODE,0
! /PNUM,TABN,0
! /PNUM,SVAL,0
! /NUMBER,0
!*
! /PNUM,ELEM,0
! /REPLOT
!*
! /DIST, 1 ,0.924021,1
! /REP,FAST
! /DIST, 1 ,0.924021,1
! /REP,FAST
! /DIST, 1 ,0.924021,1
! /REP,FAST
! /DIST, 1 ,0.924021,1
! /REP,FAST
! /DIST, 1 ,0.924021,1
! /REP,FAST
! /DIST, 1 ,0.924021,1
! /REP,FAST
! /DIST, 1 ,0.924021,1
! /REP,FAST
! /DIST, 1 ,0.924021,1
! /REP,FAST
! /DIST, 1 ,0.924021,1
! /REP,FAST
! /DIST, 1 ,0.924021,1
! /REP,FAST
! /DIST, 1 ,1.082226,1
! /REP,FAST
! /DIST, 1 ,1.082226,1
! /REP,FAST
! /DIST, 1 ,1.082226,1
! /REP,FAST
! /DIST, 1 ,1.082226,1
! /REP,FAST
! /DIST, 1 ,1.082226,1
! /REP,FAST
! /DIST, 1 ,1.082226,1
! /REP,FAST
! /DIST, 1 ,1.082226,1
! /REP,FAST
! /DIST, 1 ,1.082226,1
! /REP,FAST
! /DIST, 1 ,1.082226,1
! /REP,FAST
! /DIST, 1 ,1.082226,1
! /REP,FAST
! /VIEW,1,1,1,1
! /ANG,1
! /REP,FAST
! /VIEW,1,,,1
! /ANG,1
! /REP,FAST
! RLIST, ALL
DL,4,1,UY,0
DL,4,1,UZ,0
DL,3,1,UZ,0
DL,3,1,UY,0
! APLOT
! LPLOT
SFL,2,PRES,-4000000
SFL,PRES,5,-4000000
SFL,5,PRES,-4000000
AMESH,1
LREFINE,2
! LPLOT
LREFINE,1
LREFINE,5
! LPLOT
LREFINE,4
! LPLOT
LREFINE,3
LREFINE,6
LREFINE,7
FINISH
/SOL
ANTYPE,0
! /STATUS,SOLU
SOLVE
! LPLOT
FINISH
/PREP7
DK,6,UX,0
FINISH
/SOL
! /STATUS,SOLU
SOLVE
! APLOT
!*
! /SHRINK,0
! /ESHAPE,1
! /EFACET,1
! /RATIO,1,1,1
/CFORMAT,32,0
! /REPLOT
!*
! /DIST, 1 ,1.082226,1
! /REP,FAST
! /DIST, 1 ,1.082226,1
! /REP,FAST
! /DIST, 1 ,0.924021,1
! /REP,FAST
! /DIST, 1 ,0.924021,1
! /REP,FAST
! /DIST, 1 ,0.924021,1
! /REP,FAST
! /DIST, 1 ,1.082226,1
! /REP,FAST
! /DIST, 1 ,1.082226,1
! /REP,FAST
FINISH
/POST1
! PLDISP,0
! PLDISP,1
!*
! PLESOL, S,X, 0,1.0
!*
! PLESOL, S,Y, 0,1.0
!*
! PLESOL, S,Z, 0,1.0
!*
! PLESOL, S,EQV, 0,1.0
!*
! PLESOL, S,XY, 0,1.0
!*
! PLESOL, S,X, 0,1.0
! EPLOT
!*
! PLESOL, S,X, 0,1.0
!*
!*
! PLESOL, S,X, 0,1.0
FINISH
/SOL
! /STATUS,SOLU
SOLVE
FINISH
/POST1
!*
! PLESOL, S,X, 0,1.0
! PLDISP,0
! LPLOT
!*
! /PSF,PRES,NORM,1,1,1
! /PBF,DEFA, ,1
! /PSYMB,CS,0
! /PSYMB,NDIR,0
! /PSYMB,ESYS,0
! /PSYMB,LDIV,0
! /PSYMB,LDIR,0
! /PSYMB,ADIR,0
! /PSYMB,ECON,0
! /PSYMB,XNODE,0
! /PSYMB,DOT,1
! /PSYMB,PCONV,
! /PSYMB,LAYR,0
! /PSYMB,FBCS,0
!*
! /PBC,ALL,,1
! /PBC,NFOR,,0
! /PBC,NMOM,,0
! /PBC,RFOR,,0
! /PBC,RMOM,,0
! /PBC,PATH,,0
! /REP
!*
FINISH
/PREP7
FLST,2,1,3,ORDE,1
FITEM,2,6
DKDELE,P51X,ALL
FLST,2,1,4,ORDE,1
FITEM,2,4
DLDELE,P51X,UX
FLST,2,1,4,ORDE,1
FITEM,2,4
DLDELE,P51X,ALL
FLST,2,1,4,ORDE,1
FITEM,2,3
DLDELE,P51X,ALL
SFLDELE,       5,PRES
! LPLOT
DL,5,1,UX,0
DL,4,1,UY,0
DL,3,1,UY,0
FINISH
/SOL
! /STATUS,SOLU
SOLVE
FINISH
/POST1
! PLDISP,0
!*
! PLESOL, S,X, 0,1.0
! SAVE, file,db,
! SAVE, file,db,
! /REPLOT,RESIZE
! SAVE, file,db,
! SAVE, file,db,
! SAVE, lab3,db,U:\Desktop\
! /REPLOT,RESIZE
! LGWRITE,'lab3','lgw','U:\Desktop\',COMMENT
