/BATCH
! /COM,ANSYS RELEASE 2024 R2           BUILD 24.2      UP20240603       10:00:13
/input,menust,tmp,''
! /GRA,POWER
! /GST,ON
! /PLO,INFO,3
! /GRO,CURL,ON
! /CPLANE,1
! /REPLOT,RESIZE
WPSTYLE,,,,,,,,0
! /REPLOT,RESIZE
! ET,1,Plane182
/PREP7
!*
ET,1,PLANE182
!*
KEYOPT,1,3,3
MP,EX,1,6.8e9
MP,PRXY,1,0.33
K,1,0,0,0
K,2,0.6,0,0
K,3,0.6,-0.15,0
K,4,0.3,-0.15,0
K,5,0.2625,-0.15,0
K,6,0,-0.15,0
K,4,0.3375,-0.15,0
K,5,0.3,-0.15,0
K,6,0.3,-0.1125,0
K,7,0.2625,-0.15,0
K,8,0,-0.15,0
! /DIST, 1 ,1.082226,1
! /REP,FAST
K,9,0.15,-0.15,0
K,9,0.125,-0.15,0
K,9,0.15,-0.15,0
K,10,0.125,-0.15,0
! /DIST, 1 ,0.924021,1
! /REP,FAST
K,11,0.175,-0.15,0
K,12,0.15,-0.125,0
K,13,0.45,-0.15,0
K,14,0.425,-0.15,0
K,15,0.475,-0.15,0
K,16,0.45,-0.125,0
L,1,2
L,2,3
L,3,15
L,14,4
L,7,11
L,10,8
L,8,1
LARC,4,6,5,0.0375
LARC,6,7,5,0.0375
LARC11,12,9,0.025
LARC,11,12,9,0.025
LARC,12,10,9,0.025
LARC,15,16,13,0.025
LARC,16,14,13,0.025
AL,1,2,3,4,5,6,7,8,9,10,11,12,13
! LPLOT
! /PNUM,KP,1
! /PNUM,LINE,1
! /PNUM,AREA,1
! /PNUM,VOLU,0
! /PNUM,NODE,0
! /PNUM,TABN,0
! /PNUM,SVAL,0
! /PNUM,DOMA,0
! /NUMBER,0
!*
! /PNUM,ELEM,0
! /REPLOT
!*
AL,L1,L2,L3,L4,L5,L6,L7,L8,L9,L10,L11,L12,L13
AL,1,2,3,12,13,4,8,9,5,10,11,6,7
! klist,all
! LLIST,ALL, , ,
AL,L1,L2,L3,L12,L13,L4,L8,L9,L5,L10,L11,L6,L7
AL,1,2,3,12,13,4,8,9,5,10,11,6,7
AL,ALL
R,1,.01
DL,3,1,UY,0
DL,4,1,UY,0
DL,5,1,UY,0
DL,6,1,UY,0
DL,7,1,UX,0
SFL,2,PRES,-4000000
AMESH,1
! LLIST,ALL, , ,
! LPLOT
LREFINE,ALL
! LPLOT
! klist,all,,,coord
! SOLVE
FINISH
/SOL
! /STATUS,SOLU
SOLVE
FINISH
/POST1
! SAVE, lab3_part2_test1,db,U:\Desktop\
! LGWRITE,'lab3_part2_test1','lgw','U:\',COMMENT
! LGWRITE,'lab3_part2_test1','lgw','U:\Desktop\',COMMENT
