/BATCH
! /COM,ANSYS RELEASE 2024 R2           BUILD 24.2      UP20240603       11:45:22
/input,start,ans,'C:\Program Files\ANSYS Inc\v242\ANSYS\apdl\'
/PREP7
! /REPLOT,RESIZE
!*
ET,1,PLANE182
!*
KEYOPT,1,3,3
MP,EX,1,6.8e9
MP,PRXY,1,0.33
K,1,0,0,0
K,2,0.6,0,0
K,3,0.6,-0.15,0
K,4,0.3375,-0.15,0
K,5,0.3,-0.15,0
K,6,0.3,-0.1125,0
K,7,0.2625,-0.15,0
K,8,0,-0.15,0
K,9,0.15,-0.15,0
K,10,0.1125,-0.15,0
K,11,0.1875,-0.15,0
K,11,0.15,-0.1125,0
K,12,0.15,-0.1125,0
K,11,0.1875,-0.15,0
! /DIST, 1 ,1.082226,1
! /REP,FAST
K,13,0.45,-0.15,0
K,14,0.4125,-0.15,0
K,15,0.4875,-0.15,0
K,16,0.45,-0.1125,0
L,1,2
L,2,3
L,3,15
L,14,4
L,7,11
L,10,8
L,8,1
LARC,4,6,5,0.0375
LARC,6,7,5,0.0375
LARC11,12,9,0.0375
LARC,11,12,9,0.0375
LARC,12,10,9,0.0375
LARC,15,16,9,0.0375
LARC,14,16,9,0.0375
FLST,2,2,4,ORDE,2
FITEM,2,12
FITEM,2,-13
LDELE,P51X
LARC,15,16,13,0.0375
LARC,14,16,13,0.0375
AL,ALL
R,1,.01
DL,3,1,UY,0
DL,4,1,UY,0
DL,5,1,UY,0
DL,6,1,UY,0
DL,7,1,UX,0
SFL,2,PRES,-4000000
AMESH,1
LREFINE,ALL
! /PNUM,KP,1
! /PNUM,LINE,1
! /PNUM,AREA,1
! /PNUM,VOLU,0
! /PNUM,NODE,0
! /PNUM,TABN,0
! /PNUM,SVAL,0
! /PNUM,DOMA,0
! /NUMBER,0
!*
! /PNUM,ELEM,0
! /REPLOT
!*
! LPLOT
! klist,all,,,coord
FINISH
/SOL
! /STATUS,SOLU
SOLVE
FINISH
/POST1
! PLDISP,1
!*
! PLESOL, S,X, 0,1.0
!*
! PLESOL, S,Y, 0,1.0
!*
! PLESOL, S,XY, 0,1.0
!*
! PLESOL, S,EQV, 0,1.0
! SAVE, lab3_part2_test3,db,U:\Desktop\AERE 421\Lab 3\
! LGWRITE,'lab3_part2_test3','lgw','U:\Desktop\AERE 421\Lab 3\',COMMENT
