/BATCH
/input,menust,tmp,''
WPSTYLE,,,,,,,,0
/PREP7
ET,1,SHELL281
KEYOPT,1,1,0
KEYOPT,1,5,0
KEYOPT,1,8,1
KEYOPT,1,9,0
KEYOPT,1,10,0
KEYOPT,1,11,0
KEYOPT,1,1,0
KEYOPT,1,5,0
KEYOPT,1,8,1
KEYOPT,1,9,0
KEYOPT,1,10,0
KEYOPT,1,11,0
MPTEMP,,,,,,,,
MPTEMP,1,0
MPDATA,EX,1,,154000000
MPDATA,EY,1,,14790000
MPDATA,EZ,1,,14790000
MPDATA,PRXY,1,,0.175
MPDATA,PRYZ,1,,0.3
MPDATA,PRXZ,1,,0.175
MPDATA,GXY,1,,7480000
MPDATA,GYZ,1,,3370000
MPDATA,GXZ,1,,7480000
FC,1,S,XTEN,1500000000
FC,1,S,YTEN,40000000
FC,1,S,ZTEN,40000000
FC,1,S,XCMP,1500000000
FC,1,S,YCMP,246000000
FC,1,S,ZCMP,246000000
FC,1,S,XY,
FC,1,S,YZ,
FC,1,S,XZ,
FC,1,S,XYCP,
FC,1,S,YZCP,
FC,1,S,XZCP,
FC,1,EPEL,XTEN,
FC,1,EPEL,YTEN,
FC,1,EPEL,ZTEN,
FC,1,EPEL,XCMP,
FC,1,EPEL,YCMP,
FC,1,EPEL,ZCMP,
FC,1,EPEL,XY,
FC,1,EPEL,YZ,
FC,1,EPEL,XZ,
FC,1,S,XTEN,1500000000
FC,1,S,YTEN,40000000
FC,1,S,ZTEN,40000000
FC,1,S,XCMP,-1500000000
FC,1,S,YCMP,-246000000
FC,1,S,ZCMP,-246000000
FC,1,S,XY,0
FC,1,S,YZ,0
FC,1,S,XZ,0
FC,1,S,XYCP,0
FC,1,S,YZCP,0
FC,1,S,XZCP,0
FC,1,EPEL,XTEN,0
FC,1,EPEL,YTEN,0
FC,1,EPEL,ZTEN,0
FC,1,EPEL,XCMP,-0
FC,1,EPEL,YCMP,-0
FC,1,EPEL,ZCMP,-0
FC,1,EPEL,XY,0
FC,1,EPEL,YZ,0
FC,1,EPEL,XZ,0
sect,1,shell,,
secdata, 0.000125,1,0.0,3
secdata, 0.000125,1,0.0,3
secdata, 0.000125,1,0.0,3
secdata, 0.000125,1,0.0,3
secdata, 0.000125,1,45,3
secdata, 0.000125,1,45,3
secdata, 0.000125,1,-45,3
secdata, 0.000125,1,-45,3
secdata, 0.000125,1,-45,3
secdata, 0.000125,1,-45,3
secdata, 0.000125,1,45,3
secdata, 0.000125,1,45,3
secdata, 0.000125,1,0.0,3
secdata, 0.000125,1,0.0,3
secdata, 0.000125,1,0.0,3
secdata, 0.000125,1,0.0,3
secoffset,MID
seccontrol,,,, , , ,
sect,1,shell,,
secdata, 0.000125,1,0,3
secdata, 0.000125,1,0,3
secdata, 0.000125,1,0,3
secdata, 0.000125,1,0,3
secdata, 0.000125,1,45,3
secdata, 0.000125,1,45,3
secdata, 0.000125,1,-45,3
secdata, 0.000125,1,-45,3
secdata, 0.000125,1,-45,3
secdata, 0.000125,1,-45,3
secdata, 0.000125,1,45,3
secdata, 0.000125,1,45,3
secdata, 0.000125,1,0,3
secdata, 0.000125,1,0,3
secdata, 0.000125,1,0,3
secdata, 0.000125,1,0,3
secoffset,MID
seccontrol,0,0,0, 0, 1, 1, 1
K,1,0,-2
K,2,.5,0
K,3,0,2
LARC,1,3,2,2
K,4,2,,5
L,2,4
ADRAG,1,,,,,,2
CYL4,,,.25,,,,4
CSYS,5
VGEN,2,1,,,,90,,,,1
CSYS,0
VGEN,2,1,,,,,2.5,,,1
NUMCMP,all
ASBV,1,1
LSEL,s,loc,y,-2
LSEL,a,loc,y,2
DL,all,,ux,0
DL,all,,uz,0
ALLSEL
LSEL,s,loc,y,-2
DL,all,,uy,0
ALLSEL
SFA,all,,pres,10
SMRTSIZE,1
AMESH,all
ACLEAR,       6
CSWPLA,11,0,1,1,
CM,_Y,AREA
ASEL, , , ,       6
CM,_Y1,AREA
CMSEL,S,_Y
CMSEL,S,_Y1
AATT,       1, ,   1,      11,   1
CMSEL,S,_Y
CMDELE,_Y
CMDELE,_Y1
SMRT,2
SMRT,3
/UI,MESH,OFF
CM,_Y,AREA
ASEL, , , ,       6
CM,_Y1,AREA
CMSEL,S,_Y
CMSEL,S,_Y1
AATT,       1, ,   1,      11,   1
CMSEL,S,_Y
CMDELE,_Y
CMDELE,_Y1
CM,_Y,AREA
ASEL, , , ,       6
CM,_Y1,AREA
CMSEL,S,_Y
CMSEL,S,_Y1
AATT,       1, ,   1,      11,   1
CMSEL,S,_Y
CMDELE,_Y
CMDELE,_Y1
AMESH,ALL
FINISH
/SOL
/SOLU
SOLVE
FINISH
/POST1
FINISH
/SOL
FINISH
/PREP7
FC,1,S,XTEN,1500000000
FC,1,S,YTEN,40000000
FC,1,S,ZTEN,40000000
FC,1,S,XCMP,-1500000000
FC,1,S,YCMP,-246000000
FC,1,S,ZCMP,-246000000
FC,1,S,XY,68000000
FC,1,S,YZ,68000000
FC,1,S,XZ,68000000
FC,1,S,XYCP,0
FC,1,S,YZCP,0
FC,1,S,XZCP,0
FC,1,EPEL,XTEN,0
FC,1,EPEL,YTEN,0
FC,1,EPEL,ZTEN,0
FC,1,EPEL,XCMP,-0
FC,1,EPEL,YCMP,-0
FC,1,EPEL,ZCMP,-0
FC,1,EPEL,XY,0
FC,1,EPEL,YZ,0
FC,1,EPEL,XZ,0
FINISH
/SOL
SOLVE
FINISH
/POST1
RSYS,0
AVPRIN,0
SHELL,TOP
LAYER,1
FORCE,TOTAL
RSYS,0
AVPRIN,0
SHELL,TOP
LAYER,5
FORCE,TOTAL
RSYS,0
AVPRIN,0
SHELL,TOP
LAYER,7
FORCE,TOTAL
