/BATCH
/input,start,ans,'C:\Program Files\ANSYS Inc\v242\ANSYS\apdl\'
/PREP7
ET,1,BEAM188
MPTEMP,,,,,,,,
MPTEMP,1,0
MPDATA,EX,1,,68.9e9
MPDATA,PRXY,1,,0.33
SECTYPE,   1, BEAM, CHAN, cBeam, 0
SECOFFSET, CENT
SECDATA,0.02,0.03,0.05,0.005,0.005,0.005,0,0,0,0,0,0
K,1,0,0,0,
K,2,0.5,0,0,
LSTR,       1,       2
/CFORMAT,32,0
CM,_Y,LINE
LSEL, , , ,       1
CM,_Y1,LINE
CMSEL,S,_Y
CMSEL,S,_Y1
LATT,1, ,1, , , ,1
CMSEL,S,_Y
CMDELE,_Y
CMDELE,_Y1
FLST,5,1,4,ORDE,1
FITEM,5,1
CM,_Y,LINE
LSEL, , , ,P51X
CM,_Y1,LINE
CMSEL,,_Y
LESIZE,_Y1, , ,20, , , , ,1
LMESH, ALL
/CFORMAT,32,0
FLST,2,1,3,ORDE,1
FITEM,2,1
/GO
DK,P51X, , , ,0,ALL, , , , , ,
FLST,2,1,3,ORDE,1
FITEM,2,2
/GO
DK,P51X,UZ, , ,0,UY, , , , , ,
FLST,2,1,3,ORDE,1
FITEM,2,2
/GO
FK,P51X,FX,-1
FINISH
/SOL
ANTYPE,0
PSTRES,1
SOLVE
FINISH
/SOLUTION
ANTYPE,1
BUCOPT,LANB,1,0,0,RANGE
MXPAND,1,1,1000000,1,0.001,
SOLVE
/CFORMAT,32,0
FINISH
/POST1
SET,LIST
SET,NEXT
