/BATCH
/input,start,ans,'C:\Program Files\ANSYS Inc\v242\ANSYS\apdl\'
/input,start,ans,'C:\Program Files\ANSYS Inc\v242\ANSYS\apdl\'
/PREP7
ET,1,BEAM188
MPTEMP,,,,,,,,
MPTEMP,1,0
MPDATA,EX,1,,68.9e9
MPDATA,PRXY,1,,0.33
SECTYPE,   1, BEAM, CTUBE, , 0
SECOFFSET, CENT
SECDATA,0.008,0.01,0,0,0,0,0,0,0,0,0,0
K,1,0,0,0,
K,2,2,0,0,
K,3,1,0.75,0,
K,4,1,0,0,
LSTR,       1,       4
LSTR, 4, 2
LSTR,       2,       3
LSTR,       3,       1
LSTR, 3, 4
LESIZE,ALL, , ,20, ,1, , ,1,
FLST,5,3,4,ORDE,2
LMESH, ALL
FLST,2,1,3,ORDE,1
FITEM,2,1
/GO
DK,P51X,UY, , ,0,UX,UZ, , , , ,
FLST,2,1,3,ORDE,1
FITEM,2,2
/GO
DK,P51X,UZ, , ,0,UY, , , , , ,
FLST,2,2,3,ORDE,2
FITEM,2,3
FITEM,2,-4
/GO
DK,P51X, , , ,0,UZ, , , , , ,
FLST,2,4,4,ORDE,2
FITEM,2,1
FITEM,2,-4
/GO
DL,P51X, ,UZ,
FLST,2,1,3,ORDE,1
FITEM,2,3
FINISH
/POST1
FINISH
/PREP7
FLST,2,1,3,ORDE,1
FITEM,2,2
/GO
FK,P51X,FX,-1
FINISH
/SOL
ANTYPE,0
PSTRES,1
SOLVE
FINISH
/SOLUTION
ANTYPE,1
BUCOPT,LANB,2,0,0,RANGE
MXPAND,2,1,1000000,1,0.001,
SOLVE
