/BATCH
/input,start,ans,'C:\Program Files\ANSYS Inc\v242\ANSYS\apdl\'
FLST,2,4,4
FITEM,2,1
FITEM,2,10
FITEM,2,8
FITEM,2,9
AL,P51X
FLST,2,4,4
FITEM,2,2
FITEM,2,11
FITEM,2,7
FITEM,2,10
AL,P51X
FLST,2,4,4
FITEM,2,3
FITEM,2,12
FITEM,2,6
FITEM,2,11
AL,P51X
FLST,2,4,4
FITEM,2,4
FITEM,2,13
FITEM,2,5
FITEM,2,12
AL,P51X
/PREP7
ET,1,BEAM188
ET,2,BEAM188
ET,3,SHELL181
MPTEMP,,,,,,,,
MPTEMP,1,0
MPDATA,EX,1,,68.9e9
MPDATA,PRXY,1,,0.33
SECTYPE,   1, BEAM, L, flange, 0
SECOFFSET, CENT
SECDATA,0.076,0.076,0.0064,0.0064,0,0,0,0,0,0,0,0
SECTYPE,   2, BEAM, L, stiff, 0
SECOFFSET, CENT
SECDATA,0.051,0.051,0.0032,0.0032,0,0,0,0,0,0,0,0
sect,3,shell,,skin
secdata, 0.001,1,0.0,3
secoffset,MID
seccontrol,,,, , , ,
K,1,0,0,0,
K,2,0.75,0,0,
K,3,1.5,0,0,
K,4,2.25,0,0,
K,5,3,0,0,
K,6,3,1,0,
K,7,2.25,1,0,
K,8,1.5,1,0,
K,9,0.75,1,0,
K,10,0,1,0,
LSTR,       1,       2
LSTR,       2,       3
LSTR,       3,       4
LSTR,       4,       5
LSTR,       6,       7
LSTR,       7,       8
LSTR,       8,       9
LSTR,       9,      10
LSTR,       1,      10
LSTR,       2,       9
LSTR,       3,       8
LSTR,       4,       7
LSTR,       5,       6
FLST,2,4,4
FITEM,2,1
FITEM,2,10
FITEM,2,8
FITEM,2,9
AL,P51X
FLST,2,4,4
FITEM,2,2
FITEM,2,11
FITEM,2,7
FITEM,2,10
AL,P51X
FLST,2,4,4
FITEM,2,3
FITEM,2,12
FITEM,2,6
FITEM,2,11
AL,P51X
FLST,2,4,4
FITEM,2,4
FITEM,2,13
FITEM,2,5
FITEM,2,12
AL,P51X
LESIZE,ALL, , ,20, ,1, , ,1,
FLST,5,4,5,ORDE,2
FITEM,5,1
FITEM,5,-4
CM,_Y,AREA
ASEL, , , ,P51X
CM,_Y1,AREA
CMSEL,S,_Y
CMSEL,S,_Y1
AATT,       1, ,   3,       0,   3
CMSEL,S,_Y
CMDELE,_Y
CMDELE,_Y1
FLST,5,8,4,ORDE,2
FITEM,5,1
FITEM,5,-8
CM,_Y,LINE
LSEL, , , ,P51X
CM,_Y1,LINE
CMSEL,S,_Y
CMSEL,S,_Y1
LATT,1, ,1, , , ,1
CMSEL,S,_Y
CMDELE,_Y
CMDELE,_Y1
FLST,5,5,4,ORDE,2
FITEM,5,9
FITEM,5,-13
CM,_Y,LINE
LSEL, , , ,P51X
CM,_Y1,LINE
CMSEL,S,_Y
CMSEL,S,_Y1
LATT,1, ,2, , , ,2
CMSEL,S,_Y
CMDELE,_Y
CMDELE,_Y1
/UI,MESH,OFF
LMESH, ALL
AMESH, ALL
FLST,2,1,4,ORDE,1
FITEM,2,9
/GO
DL,P51X, ,ALL,
FLST,2,1,3,ORDE,1
FITEM,2,5
/GO
FK,P51X,FY,1
FINISH
/SOL
ANTYPE,0
PSTRES,1
SOLVE
FINISH
/SOLUTION
ANTYPE,1
BUCOPT,LANB,10,0,0,RANGE
MXPAND,10,1,1000000,1,0.001,
SOLVE
